// COMSOL Multiphysics 6.3.0.335 model "template_brinkman.mph"
// Outline of the model tree

Parameters
  Lx = 1.2[m]  // Domain width
  Ly = 0.75[m]  // Domain height
  p_in = 500[Pa]  // Pressure inlet (bottom)
  p_out = 0[Pa]  // Pressure outlet (top)
  eps_mat = 0.5  // Porosity

Functions
  int1: Interpolation "kxx"
    funcnametable = {int1, 1}
    source = file
    filename = C:\Users\rino.albertin\OneDrive - OST\2 MSE FHO DS\1_HS\VP1_Vertiefungsprojekt_1\GrainLegumes_PINO_project\data\in\kxx_case_test.csv
    filecolumns = 3
    columnKeys = {col1, col2, col3}
    columnType = {col1, arg, col2, arg, col3, value}
    funcnames = {col1, int1a, col2, int1, col3, kxx}
    fununit = m^2
    argunit = {m, m}
  int2: Interpolation "kxy"
    funcnametable = {int2, 1}
    source = file
    filename = C:\Users\rino.albertin\OneDrive - OST\2 MSE FHO DS\1_HS\VP1_Vertiefungsprojekt_1\GrainLegumes_PINO_project\data\in\kxy_case_test.csv
    filecolumns = 3
    columnKeys = {col1, col2, col3}
    columnType = {col1, arg, col2, arg, col3, value}
    funcnames = {col1, int2a, col2, int2, col3, kxy}
    fununit = m^2
    argunit = {m, m}
  int3: Interpolation "kyy"
    funcnametable = {int3, 1}
    source = file
    filename = C:\Users\rino.albertin\OneDrive - OST\2 MSE FHO DS\1_HS\VP1_Vertiefungsprojekt_1\GrainLegumes_PINO_project\data\in\kyy_case_test.csv
    filecolumns = 3
    columnKeys = {col1, col2, col3}
    columnType = {col1, arg, col2, arg, col3, value}
    funcnames = {col1, int3a, col2, int3, col3, kyy}
    fununit = m^2
    argunit = {m, m}

Geometry
  geom1 "Geometry 1" (2D, length unit m)
    r1: Rectangle | size = {Lx, Ly}
    fin: Finalize "Form Union"

Materials
  mat1: Common "Air" on all domains
    def: def "Basic"
      thermalexpansioncoefficient = alpha_p(pA,T)
      molarmass = 0.02897[kg/mol]
      bulkviscosity = muB(T)
      relpermeability = 1
      relpermittivity = 1
      dynamicviscosity = eta(T)
      ratioofspecificheat = 1.4
      electricconductivity = 0[S/m]
      heatcapacity = Cp(T)
      density = rho(pA,T)
      thermalconductivity = k(T)
      soundspeed = cs(T)
      porosity = eps_mat
      hydraulicpermeability = kappa
      eta: Piecewise | arg = T; pieces = {200.0, 1600.0, -8.38278E-7+8.35717342E-8*T^1-7.69429583E-11*T^2+4.6437266E-14*T^3-1.06585607E-17*T^4}; argunit = K; fununit = Pa*s
      Cp: Piecewise | arg = T; pieces = {200.0, 1600.0, 1047.63657-0.372589265*T^1+9.45304214E-4*T^2-6.02409443E-7*T^3+1.2858961E-10*T^4}; argunit = K; fununit = J/(kg*K)
      rho: Analytic | expr = pA*0.02897/R_const[K*mol/J]/T; args = {pA, T}; fununit = kg/m^3; argunit = {Pa, K}
      k: Piecewise | arg = T; pieces = {200.0, 1600.0, -0.00227583562+1.15480022E-4*T^1-7.90252856E-8*T^2+4.11702505E-11*T^3-7.43864331E-15*T^4}; argunit = K; fununit = W/(m*K)
      cs: Analytic | expr = sqrt(1.4*R_const[K*mol/J]/0.02897*T); args = T; fununit = m/s; argunit = K
      an1: Analytic | funcname = alpha_p; expr = -1/rho(pA,T)*d(rho(pA,T),T); args = {pA, T}; fununit = 1/K; argunit = {Pa, K}
      an2: Analytic "Analytic 2a" | funcname = muB; expr = 0.6*eta(T); args = T; fununit = Pa*s; argunit = K
    RefractiveIndex: RefractiveIndex
      n = 1
      ki = 0
    NonlinearModel: NonlinearModel
      BA = def.gamma-1
    idealGas: idealGas
      Rs = R_const/Mn
      heatcapacity = Cp(T)
      ratioofspecificheat = 1.4
      molarmass = 0.02897[kg/mol]
      Cp: Piecewise | arg = T; pieces = {200.0, 1600.0, 1047.63657-0.372589265*T^1+9.45304214E-4*T^2-6.02409443E-7*T^3+1.2858961E-10*T^4}; argunit = K; fununit = J/(kg*K)

Physics
  br: PorousMediaFlowBrinkman "Brinkman Equations" on all domains
    dependent variable u = {u, v, w}
    porous1: PorousMedium (default)
      fluid1: FluidPorousMedium "Fluid 1" (default)
        fluid = dommat
        Constitutiverelation = Newtonian
        nonNewtonianModels = PowerLaw
        sr_ref = 1[1/s]
        sr_lowlimit = 0.01[1/s]
        m_p = 10[s]
        mu_init_app = br.mu0e
        kf = 1[1/s]
        kb = 1[1/s]
        m_y0 = 1e-3[Pa*s]
        m_yt = 0[Pa*s]
        tau_y0 = 0[N/m^2]
        tau_yt = 0[N/m^2]
        nb = 1
        nf = 1
        alpha = 1
        C = 4
        Twlf = 293.15[K]
        C1wlf = 8.86
        C2wlf = 51.6[K]
        T0 = 293.15[K]
        alphaT = 1
        shift_temperature = br.Tref
      pm1: PorousMatrixPorousMedium "Porous Matrix 1" (default)
        kappa_mat = userdef
        kappa = {kxx(x,y), kxy(x,y), 0, kxy(x,y), kyy(x,y), 0, 0, 0, kxx(x,y)}
    init1: init "Initial Values 1" (default)
    wallbc1: WallBC "Wall 1" (default)
    inl1: InletBoundary "Inlet 1" on boundaries 2 | BoundaryCondition = Pressure; p0 = p_in
    out1: OutletBoundary "Outlet 1" on boundaries 3 | p0 = p_out

Mesh
  mesh1 "Mesh 1" (physics-controlled)
    size: MeshSizeDefault | table = cfd; hauto = 3

Studies
  std1 "Study 1"
    stat: Stationary

Solver configurations
  sol1 "Solution 1" (study std1)
    v1: Variables "Dependent Variables 1"
    s1: Stationary "Stationary Solver 1"
      fc1: FullyCoupled
      d1: Direct "Direct, fluid flow variables (br)"

Datasets
  dset1: Solution | solution = sol1

Plots
  pg1: PlotGroup2D "Velocity (br)" | data = dset1
    surf1: Surface | expr = br.U
    arws1: ArrowSurface (disabled) | expr = {u, v}; xnumber = 30; ynumber = 30; arrowlength = normalized
    str1: Streamline on boundaries 2 | expr = {u, v}; pointtype = arrow; arrowcount = 77; arrowscale = 0.154952563739
  pg2: PlotGroup2D "Pressure (br)" | data = dset1
    surf1: Surface | expr = p